// SBML level 3 version 2

model myelotoxicity_friberg_model_PD()
  // model units - time: hour

  // Parameters:
  circ_0 = 1 per_litre;
  MTT = 5 hour;
  gamma = 1 dimensionless;
  slope = 0.1 per_micro_molar;
  clearance = 1 per_hour;
  dosing = 0 mg;
  E_drug has dimensionless;
  drug_amount = 0 micro_mole;
  drug_conc has micro_mole_per_litre;
  central_vol = 1 litre;
  prol = 1 per_litre;
  T1 = 1 per_litre;
  T2 = 1 per_litre;
  T3 = 1 per_litre;
  circ = 1 per_litre;

  // Assignment rules:
  drug_conc := drug_amount/central_vol;
  E_drug := slope*drug_conc;

  // Rate rules:
  drug_amount' = dosing - clearance*drug_amount/central_vol;
  prol' = 4/MTT*prol*(1 - E_drug)*(circ_0/circ)^gamma - 4/MTT*prol;
  T1' = 4/MTT*prol - 4/MTT*T1;
  T2' = 4/MTT*T1 - 4/MTT*T2;
  T3' = 4/MTT*T2 - 4/MTT*T3;
  circ' = 4/MTT*T3 - 4/MTT*circ;

  // Unit definitions:
  unit hour = 3600 second;
  unit per_hour = 1 / (3600 second);
  unit per_litre = 1 / litre;
  unit per_micro_molar = litre / (1e-6 mole);
  unit micro_mole = 1e-6 mole;
  unit micro_mole_per_litre = 1e-6 mole / litre;
  unit mg = 1e-3 gram;
end
